// SBML level 2 version 4

model Ciliberto2003_Morphogenesis()
  // Ciliberto2003_Morphogenesis_Checkpoint
  // This a model from the article:
  // Mathematical model of the morphogenesis checkpoint in budding yeast.
  // Ciliberto A, Novak B, Tyson JJ J. Cell Biol. [2003 Dec; Volume: 163 (Issue: 6 )] Page info: 1243-54 14691135 ,
  // Abstract:
  // The morphogenesis checkpoint in budding yeast delays progression through the cell cycle in response to stimuli that prevent bud formation. Central to the checkpoint mechanism is Swe1 kinase: normally inactive, its activation halts cell cycle progression in G2. We propose a molecular network for Swe1 control, based on published observations of budding yeast and analogous control signals in fission yeast. The proposed Swe1 network is merged with a model of cyclin-dependent kinase regulation, converted into a set of differential equations and studied by numerical simulation. The simulations accurately reproduce the phenotypes of a dozen checkpoint mutants. Among other predictions, the model attributes a new role to Hsl1, a kinase known to play a role in Swe1 degradation: Hsl1 must also be indirectly responsible for potent inhibition of Swe1 activity. The model supports the idea that the morphogenesis checkpoint, like other checkpoints, raises the cell size threshold for progression from one phase of the cell cycle to the next.
  // The model reproduces Fig 3 of the paper.
  // This model originates from BioModels Database: A Database of Annotated Published Models (http://www.ebi.ac.uk/biomodels/). It is copyright (c) 2005-2011 The BioModels.net Team.
  // For more information see the terms of use .
  // To cite BioModels Database, please use: Li C, Donizelli M, Rodriguez N, Dharuri H, Endler L, Chelliah V, Li L, He E, Henry A, Stefan MI, Snoep JL, Hucka M, Le Novère N, Laibe C (2010) BioModels Database: An enhanced, curated and annotated resource for published quantitative kinetic models. BMC Syst Biol., 4:92.
  // biomodels.db:MODEL2504064544
  // biomodels.db:BIOMD0000000297
  // isDescribedBy pubmed:14691135
  // hasTaxon taxonomy:4896
  // isVersionOf GO:0000078 GO:0009653
  // isPartOf kegg.pathway:ko04111

  // Compartments:
  compartment compartment;  // isVersionOf GO:0005623

  // Species:
  species Trim in compartment = 0.084410675/compartment; Trim is "CDC28_Clb2_Sic1_Complex";  // hasPart uniprot:P38634 uniprot:P24869 uniprot:Q10752
  species Clb in compartment = 0.18453673/compartment; Clb is "Clb2";  // isHomologTo uniprot:P24869
  species Sic in compartment = 0.0035491784/compartment; Sic is "Sic1";  // isHomologTo uniprot:P38634
  species PTrim in compartment = 1.402314e-5/compartment; PTrim is "Phosphorylated Cdc28_Clb2_Sic1 Complex";  // hasPart uniprot:P24869 uniprot:P38634 uniprot:Q10752
  species PClb in compartment = 3.0203049e-5/compartment; PClb is "Phosphorylated Clb2";  // isHomologTo uniprot:P24869
  species SBF in compartment = 0.12405464/compartment;  // isHomologTo uniprot:Q08471
  species IE in compartment = 0.52220768/compartment; IE is "Intermediary Enzyme";
  species Cdc20a in compartment = 1.4384692/compartment; Cdc20a is "Cdc20 activated";  // isHomologTo uniprot:P26309
  species Cdc20 in compartment = 1.1722378/compartment;  // isHomologTo uniprot:P26309
  species Cdh1 in compartment = 0.99263656/compartment;  // isHomologTo uniprot:P53197
  species Swe1 in compartment = 0.00031588585/compartment;  // isHomologTo uniprot:P32944
  species Swe1M in compartment = 0.018360127/compartment; Swe1M is "Swe1 modified";  // isHomologTo uniprot:P32944
  species PSwe1 in compartment = 0.00020500785/compartment; PSwe1 is "Phosphorylated Swe1";  // isHomologTo uniprot:P32944
  species PSwe1M in compartment = 0.013336782/compartment; PSwe1M is "Phosphorylated Swe1M";  // isHomologTo uniprot:P32944
  species Mih1a in compartment = 0.80809075/compartment;  // isHomologTo uniprot:P23748
  species Mcm in compartment = 0.93289256/compartment;  // isHomologTo uniprot:P11746
  species BE in compartment = 0.00024296179/compartment;
  species Clg in compartment = 0.053600963/compartment;  // isHomologTo uniprot:P20438 uniprot:P20437
  species mass in compartment = 0.80224854/compartment;

  // Parameters:
  kswe_prime = 2;
  kswe_doubleprime = 0.01;
  kswe_tripleprime = 0.2;
  kmih_prime = 5;
  Mih_ast = 0;
  kmih_doubleprime = 0.5;
  Mih = 0;
  IEtot = 1;
  Cdh1tot = 1;
  Mih1tot = 1;
  Mcmtot = 1;
  SBFtot = 1;
  kdiss = 0.1;
  kdsic_prime = 1;
  kdsic_doubleprime = 3;
  kdsic = 0.01;
  kdclb_doubleprime = 1;
  kdclb_tripleprime = 0.1;
  kdclb_prime = 0.015;
  kass = 300;
  ksclb = 0.015;
  Jm = 10;
  eps = 0.5;
  kisbf_prime = 1;
  kisbf_doubleprime = 2;
  jisbf = 0.01;
  kasbf_prime = 1;
  kasbf_doubleprime = 0;
  jasbf = 0.01;
  kiie = 0.04;
  jiie = 0.01;
  kaie = 0.1;
  jaie = 0.01;
  kicdc20 = 0.25;
  jicdc20 = 0.001;
  kdcdc20 = 0.1;
  kacdc20 = 1;
  jacdc20 = 0.001;
  kicdh = 35;
  kicdh_prime = 2;
  jicdh = 0.01;
  Kacdh_prime = 1;
  Kacdh_doubleprime = 10;
  jacdh = 0.01;
  khsl1 = 1;
  BUD = 0;
  Viwee = 1;
  Jiwee = 0.05;
  kdswe_prime = 0.007;
  khsl1r = 0.01;
  Vawee = 0.3;
  Jawee = 0.05;
  ksswe = 0.0025;
  kssweC = 0;
  Vimih = 0.3;
  jimih = 0.1;
  Vamih = 1;
  Jamih = 0.1;
  kimcm = 0.15;
  jimcm = 0.1;
  kamcm = 1;
  jamcm = 0.1;
  kdbud = 0.1;
  ksbud = 0.1;
  kssic = 0.1;
  kdclg = 0.1;
  ksclg = 0.1;
  kscdc20_prime = 0.005;
  kscdc20_doubleprime = 0.3;
  jscdc20 = 0.3;
  kdswe_doubleprime = 0.05;
  mu = 0.005;
  flag = 0;

  // Assignment rules:
  compartment := kswe_prime();
  local_param := kswe_prime();
  kswe := kswe_prime*Swe1 + kswe_doubleprime*Swe1M + kswe_tripleprime*PSwe1;
  kmih := kmih_prime*Mih_ast + kmih_doubleprime*Mih;
  Swe1T := Swe1 + Swe1M + PSwe1 + PSwe1M;
  IEin := IEtot - IE;
  Cdh1in := Cdh1tot - Cdh1;
  Mih1 := Mih1tot - Mih1a;
  Mcmin := Mcmtot - Mcm;
  SBFin := SBFtot - SBF;

  // Reactions:
  Clb_Sic_dissociation: Trim => Sic + Clb; kdiss*Trim; Clb_Sic_dissociation is "Clb-Sic dissociation";  // isVersionOf GO:0043241
    local_param = 10;
  Clb2_removal_from_complex: Trim => Clb; Trim*(kdsic_prime*Clg + kdsic_doubleprime*Clb + kdsic);  // modifiers: Clg; isVersionOf GO:0043241
  Sic1_removal_from_complex: Trim => Sic; Trim*(kdclb_doubleprime*Cdh1 + kdclb_tripleprime*Cdc20a + kdclb_prime);  // modifiers: Cdh1, Cdc20a; isVersionOf GO:0043241
  R4: Trim => PTrim; Trim*kswe; R4 is "Phosphorylation of Cdc28-Clb2-Sic1 complex";  // isVersionOf GO:0006468
  Complex_formation: Sic + Clb => Trim; kass*Sic*Clb;  // isVersionOf GO:0006461
  Dephosphorylation_of_complex: PTrim => Trim; PTrim*kmih;  // isVersionOf GO:0006470
  Clb2_degradation: Clb => ; Clb*(kdclb_doubleprime*Cdh1 + kdclb_tripleprime*Cdc20a + kdclb_prime);  // modifiers: Cdh1, Cdc20a; isVersionOf GO:0030163
  Clb2_phosphorylation: Clb => PClb; kswe*Clb;  // isVersionOf GO:0006468
  Clb2_synthesis: => Clb; ksclb*mass*Jm*(eps + Mcm)/(mass + Jm);  // modifiers: mass, Mcm; isVersionOf GO:0006412
  Clb2_dephosphorylation: PClb => Clb; kmih*PClb;  // isVersionOf GO:0006470
  SBF_inhibition: SBF => ; SBF*(kisbf_prime + kisbf_doubleprime*Clb)/(jisbf + SBF);  // modifiers: Clb; isVersionOf GO:0032091
  SBF_synthesis: => SBF; SBFin*(kasbf_prime*mass + kasbf_doubleprime*Clg)/(jasbf + SBFin);  // modifiers: mass, Clg; isVersionOf GO:0006412
  IE_inhibition: IE => ; IE*kiie/(jiie + IE);  // isVersionOf GO:0032091
  IE_synthesis: => IE; kaie*IEin*Clb/(jaie + IEin);  // modifiers: Clb; isVersionOf GO:0006412
  Cdc20_deactivation: Cdc20a => Cdc20; Cdc20a*kicdc20/(jicdc20 + Cdc20a);  // isVersionOf MOD:00000
  activated_Cdc20_degradation: Cdc20a => ; kdcdc20*Cdc20a;  // isVersionOf GO:0030163
  Cdc20_activation: Cdc20 => Cdc20a; kacdc20*Cdc20*IE/(jacdc20 + Cdc20);  // modifiers: IE; isVersionOf MOD:00000
  Cdh1inhibition: Cdh1 => ; Cdh1*(kicdh*Clb + kicdh_prime*Clg)/(jicdh + Cdh1);  // modifiers: Clb, Clg; isVersionOf GO:0032091
  Cdh1_synthesis: => Cdh1; Cdh1in*(Kacdh_prime + Kacdh_doubleprime*Cdc20a)/(jacdh + Cdh1in);  // modifiers: Cdc20a; isVersionOf GO:0006412
  Swe1_modification: Swe1 => Swe1M; khsl1*BUD*Swe1;  // isVersionOf MOD:00000
  Phosphorylated_Swe1_modification: PSwe1 => PSwe1M; khsl1*BUD*PSwe1;  // isVersionOf MOD:00000
  Swe1_phosphorylation: Swe1 => PSwe1; Viwee*Swe1*Clb/(Jiwee + Swe1);  // modifiers: Clb; isVersionOf GO:0006468
  Swe1M_phosphorylation: Swe1M => PSwe1M; Viwee*Swe1M*Clb/(Jiwee + Swe1M);  // modifiers: Clb; isVersionOf GO:0006468
  Swe1_degradation: Swe1 => ; kdswe_prime*Swe1;  // isVersionOf GO:0030163
  R26: Swe1M => Swe1; khsl1r*Swe1M; R26 is "Swe1 production from its modified form";  // isVersionOf MOD:00000
  R27: PSwe1M => PSwe1; khsl1r*PSwe1M; R27 is "PSwe1 production from its modified form";  // isVersionOf MOD:00000
  PSwe1_dephosphorylation: PSwe1 => Swe1; PSwe1*Vawee/(Jawee + PSwe1);  // isVersionOf GO:0006470
  PSwe1M_dephosphorylation: PSwe1M => Swe1M; PSwe1M*Vawee/(Jawee + PSwe1M);  // isVersionOf GO:0006470
  SBF_dependent_Swe1_synthesis: => Swe1; ksswe*SBF;  // modifiers: SBF; isVersionOf GO:0006412
  Swe1_synthesis: => Swe1; kssweC;  // isVersionOf GO:0006412
  PSwe1_degradation: PSwe1 => ; kdswe_prime*PSwe1;  // isVersionOf GO:0030163
  PTrim_complex_dissociation: PTrim => PClb + Sic; kdiss*PTrim;  // isVersionOf GO:0043241
  R34: PTrim => Sic; PTrim*(kdclb_doubleprime*Cdh1 + kdclb_tripleprime*Cdc20a + kdclb_prime); R34 is "Sic1 dissociation from PTrim complex";  // modifiers: Cdh1, Cdc20a; isVersionOf GO:0043241
  R35: PTrim => PClb; PTrim*(kdsic_prime*Clg + kdsic_doubleprime*Clb + kdsic); R35 is "PClb dissociation from PTrim complex";  // modifiers: Clg, Clb; isVersionOf GO:0043241
  PTrim_complex_formation: Sic + PClb => PTrim; kass*PClb*Sic;  // isVersionOf GO:0006461
  Mih1a_inhibition: Mih1a => ; Mih1a*Vimih/(jimih + Mih1a);  // isVersionOf GO:0032091
  Mih1a_synthesis: => Mih1a; Vamih*Mih1*Clb/(Jamih + Mih1);  // modifiers: Clb; isVersionOf GO:0006412
  Mcm_inhibition: Mcm => ; Mcm*kimcm/(jimcm + Mcm);  // isVersionOf GO:0032091
  Mcm_synthesis: => Mcm; Mcmin*Clb*kamcm/(jamcm + Mcmin);  // modifiers: Clb; isVersionOf GO:0006412
  BE_degradation: BE => ; kdbud*BE;  // isVersionOf GO:0030163
  BE_formation: => BE; ksbud*Clg;  // modifiers: Clg
  Sic1_degradation: Sic => ; Sic*(kdsic_prime*Clg + kdsic_doubleprime*Clb + kdsic);  // modifiers: Clg, Clb; isVersionOf GO:0030163
  Sic1_synthesis: => Sic; kssic;  // isVersionOf GO:0006412
  Clg_degradation: Clg => ; kdclg*Clg;  // isVersionOf GO:0030163
  SBF_dependent_Clg_synthesis: => Clg; ksclg*SBF;  // modifiers: SBF; isVersionOf GO:0006412
  Swe1M_degradation: Swe1M => ; kdswe_prime*Swe1M;  // isVersionOf GO:0030163
  Cdc20_degradation: Cdc20 => ; kdcdc20*Cdc20;  // isVersionOf GO:0030163
  Clb2_dependent_Cdc20_synthesis: => Cdc20; kscdc20_prime + kscdc20_doubleprime*Clb^4/(jscdc20^4 + Clb^4);  // modifiers: Clb; isVersionOf GO:0006412
  PSwe1M_degradation: PSwe1M => ; kdswe_doubleprime*PSwe1M;  // isVersionOf GO:0030163
  PClb_degradation: PClb => ; PClb*(kdclb_doubleprime*Cdh1 + kdclb_tripleprime*Cdc20a + kdclb_prime);  // modifiers: Cdh1, Cdc20a; isVersionOf GO:0030163
  cell_mass: => mass; mu*mass;  // isVersionOf GO:0001828

  // Events:
  event_0000002: at (Clb > 0.2): flag = 1;
  event_0000004: at ((Clb < 0.2) && (flag > 0)): BE = 0, mass = 0.5*mass;
  event_0000003: at ((Clb >= 0.2) || (BE >= 0.6)): BUD = 1;
  event_0000005: at ((Clb < 0.2) && (BE < 0.6)): BUD = 0;

  // Unit definitions:
  unit time = 60 second; time is "minutes";
  unit substance = item;
end
