// SBML level 2 version 4

model Ciliberto2003_Morphogenesis()
  // Ciliberto2003_Morphogenesis_Checkpoint

  // Compartments:
  compartment compartment = 1;

  // Species:
  species Trim in compartment = 0.1; Trim is "CDC28_Clb2_Sic1_Complex";
  species Clb in compartment = 0.1; Clb is "Clb2";
  species Sic in compartment = 0.1; Sic is "Sic1";
  species SpeciesToReplace in compartment = 0.0035491784; SpeciesToReplace is "Sic1";

  // Parameters:
  Fe2GutQUant = 1e-7 second;

  // Reactions:
  lumen: Clb + Sic => Trim; k1*(Clb/Sic); lumen is "01. StomachLumen -> IntestineLumen";
    k1 = 350 molsPerSecond;

  // Unit definitions:
  unit volume = 1e-3 litre;
  unit time = second;
  unit substance = 1e-9 mole;
  unit unit_0 = 1e-3 gram; unit_0 is "mg";
  unit millilitre = 1e-3 litre; millilitre is "ml";
  unit molsPerSecond = 1e-9 mole / second; molsPerSecond is "mols/s";
end
